OpenVSP model (file version 5), 2 components.
Geometry view with OpenVSP parameter names; values to 6 digits, angles in degrees, lengths in the model's unit.
Overall bounding box: X_Min=0 X_Len=2.24975 Y_Min=-0.725109 Y_Len=1.45022 Z_Min=-0.112487 Z_Len=0.224975

Wing "Main_Wing"
  location (X Y Z) 0.499939 0 0, rotation 0 0 0
  symmetric about XZ
  bounding box size 1.45145 1.45022 0.0580838
  totals: TotalSpan=1.45082 TotalProjectedSpan=1.45022 TotalChord=0.806357 TotalArea=0.999994 TotalAR=2.10314 MAC=0.870618
  root: chord 1.45145, twist 0, NACA 63-series A=1 IdealCl=0 ThickChord=0.04
  sections:
    n  Span     Root_Chord  Tip_Chord  Area      Sweep  Sweep_Location  Dihedral  Twist  Twist_Location  tip airfoil
    1  0.23103  1.45145     0.806353   0.26081   60     0               0         0      0.25            as above
    2  0.49438  0.806353    0.161271   0.239187  60     0               -2        0      0.25            as above

Stack "Fuselage"
  location (X Y Z) 0 0 0, rotation 0 0 0
  bounding box size 2.24975 0.224975 0.224975
  cross sections:
    n  XDelta    YDelta  ZDelta  shape
    0  0         0       0       point
    1  0.999888  0       0       circle Circle_Diameter=0.224975
    2  0.749916  0       0       as above
    3  0.499944  0       0       point
