OpenVSP model (file version 5), 5 components.
Geometry view with OpenVSP parameter names; values to 6 digits, angles in degrees, lengths in the model's unit.
Overall bounding box: X_Min=0 X_Len=62.3684 Y_Min=-16.9429 Y_Len=33.8858 Z_Min=-3.445 Z_Len=8.9441

Stack "Fuse"
  location (X Y Z) 0 0 0, rotation 0 0 0
  bounding box size 62.3684 6.5 6.5
  cross sections:
    n  XDelta   YDelta  ZDelta  shape
    0  0        0       0       point
    1  12       0       0       circle Circle_Diameter=3.5
    2  4.86842  0       0       circle Circle_Diameter=3.25
    3  20       0       0       circle Circle_Diameter=6.5
    4  15.5     0       0       as above
    5  10       0       0       point

Stack "Engine"
  location (X Y Z) 37.9537 0 0, rotation 0 0 0
  bounding box size 15.5 6.89 6.89
  cross sections:
    n  XDelta  YDelta  ZDelta  shape
    0  0       0       0       circle Circle_Diameter=6.89
    1  15.5    0       0       circle Circle_Diameter=5.8

Wing "Wing"
  location (X Y Z) 28.0137 2 0, rotation 0 0 0
  symmetric about XZ
  bounding box size 30.4504 33.8858 1.92192
  totals: TotalSpan=30 TotalProjectedSpan=29.8858 TotalChord=15.3646 TotalArea=460.937 TotalAR=1.93771 MAC=17.9398
  root: chord 26.2595, twist 0, biconvex ThickChord=0.04
  sections:
    n  Span  Root_Chord  Tip_Chord  Area     Sweep  Sweep_Location  Dihedral  Twist  Twist_Location  tip airfoil
    1  15    26.2595     4.46961    230.468  60     0               -5        0      0.25            as above

Wing "VStab"
  location (X Y Z) 48.0137 10 0, rotation 90 0 0
  symmetric about XZ
  bounding box size 12.1001 20.2933 5.4991
  totals: TotalSpan=10.9982 TotalProjectedSpan=10.9982 TotalChord=4.95437 TotalArea=54.4891 TotalAR=2.2199 MAC=5.33514
  root: chord 7.33333, twist 0, biconvex ThickChord=0.04
  sections:
    n  Span    Root_Chord  Tip_Chord  Area     Sweep  Sweep_Location  Dihedral  Twist  Twist_Location  tip airfoil
    1  5.4991  7.33333     2.5754     27.2446  60     0               0         0      0.25            as above

Wing "Canards"
  location (X Y Z) 12.1311 1.5 0, rotation 0 0 0
  symmetric about XZ
  bounding box size 7.66667 15.2143 0.306667
  totals: TotalSpan=12.2143 TotalProjectedSpan=12.2143 TotalChord=4.33333 TotalArea=52.9286 TotalAR=2.81868 MAC=5.18803
  root: chord 7.66667, twist 0, biconvex ThickChord=0.04
  sections:
    n  Span     Root_Chord  Tip_Chord  Area     Sweep  Sweep_Location  Dihedral  Twist  Twist_Location  tip airfoil
    1  6.10714  7.66667     1          26.4643  0      1               0         0      0.25            as above

VSPAERO settings (reference component "Wing"): Sref=460.937 bref=30 cref=17.9398 Xcg=40 Ycg=0 Zcg=0 AlphaStart=-5 AlphaEnd=20 AlphaNpts=13 BetaStart=0 BetaEnd=0 BetaNpts=1 MachStart=0.1 MachEnd=0 MachNpts=1 ReCref=1e+07 Vinf=100 Rho=0.002377
